A := 0.20
B := 0.36
f(x) :=
    if 0 ≤ x ≤ 2
        B*(4 - x^2)
    else if -2 < x < 0
        A*(x + 2)
    else
        0
a(k) :=
    0.5*(integral(A*(x + 2)*cos(π*k*x/2), x = -2 .. 0) + integral(B*(4 - x^2)*cos(π*k*x/2), x = 0 .. 2))
b(k) :=
    0.5*(integral(A*(x + 2)*sin(π*k*x/2), x = -2 .. 0) + integral(B*(4 - x^2)*sin(π*k*x/2), x = 0 .. 2))
Af :=
    for i ∈ 1 .. 20
        M[i] ← a(i)
    return M
    float, 4 → [0; 0.372861955804; -0.0729512522225; 0.0414291062004; -0.0182378130556; 0.0149144782322; -0.00810569469139; 0.00760942766947; -0.00455945326391; 0.00460323402227; -0.0029180500889; 0.00308150376697; -0.00202642367285; 0.00220628376215; -0.00148880106576; 0.00165716424802; -0.00113986331598; 0.00129017977787; -0.000900632743487; 0.00103285860333; -0.000729512522225]
Af[0] := 0.5*(integral(A*(x + 2), x = -2 .. 0) + integral(B*(4 - x^2), x = 0 .. 2))
Af = [1.16; 0.372862; -0.0729513; 0.0414291; -0.0182378; 0.0149145; -0.00810569; 0.00760943; -0.00455945; 0.00460323; -0.00291805; 0.0030815; -0.00202642; 0.00220628; -0.0014888; 0.00165716; -0.00113986; 0.00129018; -0.000900633; 0.00103286; -0.000729513]
Bf :=
    for i ∈ 1 .. 20
        M[i] ← b(i)
    return M
    float, 4 → [0; 0.516811119966; 0.165521140816; 0.117227754556; 0.0827605704078; 0.0676946070329; 0.0551737136052; 0.0478333546305; 0.0413802852039; 0.0370373026755; 0.0331042281631; 0.0302343237533; 0.0275868568026; 0.025549346579; 0.0236458772594; 0.0221245280608; 0.0206901426019; 0.0195108870812; 0.0183912378684; 0.0174503619343; 0.0165521140816]
Bf = [0; 0.516811; 0.165521; 0.117228; 0.0827606; 0.0676946; 0.0551737; 0.0478334; 0.0413803; 0.0370373; 0.0331042; 0.0302343; 0.0275869; 0.0255493; 0.0236459; 0.0221245; 0.0206901; 0.0195109; 0.0183912; 0.0174504; 0.0165521]
S(n, x) :=
    Af[0]/2 + sum(Af[k]*cos(k*x) + Bf[k]*sin(k*x), k = 1 .. n)
# [plot: f(x), S(1, x), S(5, x), S(20, x) vs x]
qmf := 0.5*(integral((A*(x + 2))^2, x = -2 .. 0) + integral((B*(4 - x^2))^2, x = 0 .. 2)) = 1.15925
qmS(n) :=
    Af[0]^2/2 + sum(Af[k]^2 + Bf[k]^2, k = 1 .. n)
D(n) :=
    sqrt(qmf - qmS(n))
D(1) = 0.283432
D(5) = 0.142017
D(20) = 0.0731553
